test_v := 4
test_e := 5
avg_w_V(T) :=
    t_i ← 0
    k ← 0
    while t_i < rows(T)
        res[k, 0] ← T[t_i, 0]
        s ← 0
        denom ← 0
        for i ∈ 0 .. test_v
            s ← s + T[t_i, 2]*T[t_i, 1]
            denom ← denom + T[t_i, 1]
            t_i ← t_i + 1
        res[k, 1] ← s/denom
        k ← k + 1
    return res
avg_s_V(T) :=
    t_i ← 0
    k ← 0
    while t_i < rows(T)
        res[k, 0] ← T[t_i, 0]
        s ← 0
        denom ← 0
        for i ∈ 0 .. test_v
            s ← s + T[t_i, 2]
            denom ← denom + 1
            t_i ← t_i + 1
        res[k, 1] ← s/denom
        k ← k + 1
    return res
avg_w_E(T) :=
    k ← 0
    while k < test_e
        t_i ← k
        res[k, 0] ← T[k, 1]
        s ← 0
        denom ← 0
        while t_i < rows(T)
            s ← s + T[t_i, 2]*T[t_i, 1]
            denom ← denom + T[t_i, 1]
            t_i ← t_i + test_v
        res[k, 1] ← s/denom
        k ← k + 1
    return res
avg_s_E(T) :=
    k ← 0
    while k < test_e
        t_i ← k
        res[k, 0] ← T[k, 1]
        s ← 0
        denom ← 0
        while t_i < rows(T)
            s ← s + T[t_i, 2]
            denom ← denom + 1
            t_i ← t_i + test_v
        res[k, 1] ← s/denom
        k ← k + 1
    return res
avg_V(T) := avg_w_V(T)
avg_E(T) := avg_w_E(T)
SDGPP := [
    1000, 250000, 0.28338;
    1000, 400000, 0.512909;
    1000, 500000, 0.702318;
    1000, 700000, 0.659509;
    1000, 800000, 0.639328;
    2000, 250000, 0.67298;
    2000, 400000, 1.05484;
    2000, 500000, 1.29003;
    2000, 700000, 1.84283;
    2000, 800000, 2.10453;
    4000, 250000, 1.49943;
    4000, 400000, 2.27953;
    4000, 500000, 2.85357;
    4000, 700000, 3.89277;
    4000, 800000, 4.46526;
    5000, 250000, 2.06011;
    5000, 400000, 3.00779;
    5000, 500000, 3.82976;
    5000, 700000, 5.50557;
    5000, 800000, 5.89804
]
SVKB := [
    1000, 250000, 0.00227259;
    1000, 400000, 0.00267167;
    1000, 500000, 0.00307457;
    1000, 700000, 0.00321972;
    1000, 800000, 0.00325162;
    2000, 250000, 0.00541766;
    2000, 400000, 0.00538194;
    2000, 500000, 0.00643242;
    2000, 700000, 0.00879561;
    2000, 800000, 0.00910217;
    4000, 250000, 0.019622;
    4000, 400000, 0.0178557;
    4000, 500000, 0.022843;
    4000, 700000, 0.0263202;
    4000, 800000, 0.019044;
    5000, 250000, 0.0320776;
    5000, 400000, 0.027801;
    5000, 500000, 0.0245057;
    5000, 700000, 0.0291453;
    5000, 800000, 0.0294177
]
BDGPP := [
    1000, 250000, 0.139411;
    1000, 400000, 0.210336;
    1000, 500000, 0.0967249;
    1000, 700000, 0.0770624;
    1000, 800000, 0.0770831;
    2000, 250000, 1.24036;
    2000, 400000, 0.675885;
    2000, 500000, 0.448295;
    2000, 700000, 0.569354;
    2000, 800000, 0.632271;
    4000, 250000, 8.8456;
    4000, 400000, 10.8733;
    4000, 500000, 10.7074;
    4000, 700000, 9.78116;
    4000, 800000, 10.086;
    5000, 250000, 11.8206;
    5000, 400000, 15.3053;
    5000, 500000, 18.0868;
    5000, 700000, 18.9456;
    5000, 800000, 17.9127
]
SVSSS := [
    1000, 250000, 0.00351352;
    1000, 400000, 0.0049752;
    1000, 500000, 0.00492991;
    1000, 700000, 0.00555803;
    1000, 800000, 0.00520616;
    2000, 250000, 0.0142589;
    2000, 400000, 0.0116466;
    2000, 500000, 0.0130247;
    2000, 700000, 0.0143906;
    2000, 800000, 0.0164294;
    4000, 250000, 0.0387173;
    4000, 400000, 0.0419103;
    4000, 500000, 0.0432944;
    4000, 700000, 0.0482071;
    4000, 800000, 0.0443918;
    5000, 250000, 0.0647772;
    5000, 400000, 0.053975;
    5000, 500000, 0.0547799;
    5000, 700000, 0.0750383;
    5000, 800000, 0.0622832
]
BVKB := [
    1000, 250000, 0.00187256;
    1000, 400000, 0.00327076;
    1000, 500000, 0.00356105;
    1000, 700000, 0.00349949;
    1000, 800000, 0.00364719;
    2000, 250000, 0.00294059;
    2000, 400000, 0.00415855;
    2000, 500000, 0.00452509;
    2000, 700000, 0.00560269;
    2000, 800000, 0.00542787;
    4000, 250000, 0.00577878;
    4000, 400000, 0.00649877;
    4000, 500000, 0.00600782;
    4000, 700000, 0.00735785;
    4000, 800000, 0.00876658;
    5000, 250000, 0.00774959;
    5000, 400000, 0.00819205;
    5000, 500000, 0.00778947;
    5000, 700000, 0.00973572;
    5000, 800000, 0.00894076
]
BVSSS := [
    1000, 250000, 0.00670357;
    1000, 400000, 0.00992329;
    1000, 500000, 0.0123423;
    1000, 700000, 0.0122058;
    1000, 800000, 0.0121455;
    2000, 250000, 0.009158;
    2000, 400000, 0.0114287;
    2000, 500000, 0.0147393;
    2000, 700000, 0.0199487;
    2000, 800000, 0.0208154;
    4000, 250000, 0.0207774;
    4000, 400000, 0.0219629;
    4000, 500000, 0.0255912;
    4000, 700000, 0.0265846;
    4000, 800000, 0.0295944;
    5000, 250000, 0.0258841;
    5000, 400000, 0.0254314;
    5000, 500000, 0.0286211;
    5000, 700000, 0.0319672;
    5000, 800000, 0.0352009
]
SDGPP_V := avg_V(SDGPP)
SVKB_V := avg_V(SVKB)
BDGPP_V := avg_V(BDGPP)
BVKB_V := avg_V(BVKB)
SDGPP_E := avg_E(SDGPP)
SVSSS_V := avg_V(SVSSS)
SVKB_E := avg_E(SVKB)
BDGPP_E := avg_E(BDGPP)
BVSSS_V := avg_V(BVSSS)
BVKB_E := avg_E(BVKB)
SVSSS_E := avg_E(SVSSS)
BVSSS_E := avg_E(BVSSS)
SDGPP_V = [1000, 0.603882; 2000, 1.58823; 4000, 3.40023; 5000, 4.60579]
SVKB_V = [1000, 0.00302989; 2000, 0.00760833; 4000, 0.021558; 5000, 0.0284259]
BDGPP_V = [1000, 0.106777; 2000, 0.644889; 4000, 10.1245; 5000, 17.2501]
BVKB_V = [1000, 0.00336768; 2000, 0.00487747; 4000, 0.00724976; 5000, 0.00870814]
SVSSS_V = [1000, 0.00505244; 2000, 0.0143218; 4000, 0.0442827; 5000, 0.063218]
BVSSS_V = [1000, 0.0113497; 2000, 0.0169234; 4000, 0.0260603; 5000, 0.0307517]
SDGPP_E = [250000, 1.69894; 400000, 2.52711; 500000, 3.23549; 700000, 2.73658; 800000, 1.84639]
SVKB_E = [250000, 0.0120258; 400000, 0.0152384; 500000, 0.0166915; 700000, 0.0166664; 800000, 0.0130417]
BDGPP_E = [250000, 4.51732; 400000, 6.33594; 500000, 9.00409; 700000, 8.26895; 800000, 4.97335]
BVKB_E = [250000, 0.00512774; 400000, 0.00582301; 500000, 0.00706298; 700000, 0.00618932; 800000, 0.00546682]
SVSSS_E = [250000, 0.0220204; 400000, 0.0301258; 500000, 0.0395635; 700000, 0.0351653; 800000, 0.0239481]
BVSSS_E = [250000, 0.0182357; 400000, 0.0210683; 500000, 0.0233923; 700000, 0.0223889; 800000, 0.0194369]
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# [component: inputs (SDGPP[:, 0], SDGPP[:, 1], SDGPP[:, 2])]
# [component: inputs (BDGPP[:, 0], BDGPP[:, 1], BDGPP[:, 2])]
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# [component: inputs (SVKB[:, 0], SVKB[:, 1], SVKB[:, 2])]
# [component: inputs (BVKB[:, 0], BVKB[:, 1], BVKB[:, 2])]
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# [component: inputs (BVSSS[:, 0], BVSSS[:, 1], BVSSS[:, 2])]
# [component: inputs (SVSSS[:, 0], SVSSS[:, 1], SVSSS[:, 2])]
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